# Answer Key
# Homework 2
# 2.611 Fall 2006
# Problem 1:
#
# For part one I am giving credit for any reasonable answer.  Essentially you should have discussed inlet and outlet losses.  They are modeled in the class example as velocity terms by increasing the  change in pressure across the waterjet inlet and outlet.
K_in == ΔP_in_loss/(.5*ρ*V_a^2)
K_out == ΔP_out_loss/(.5*ρ*V_j^2)
# For part two you can examine the equation itself to determine what you can change to increase η.
# Increase pump efficiency, decrease h which means you want the discharge close to the waterline, decrease losses at inlet and outlet, increase w and decrease t.  Further, if you examine the ideal case where pump is perfect,
# w=t, h approaches zero, and no loss terms you get:
η_D == 2*μ(1 - μ)/(1 - μ^2)
η_D == 2*μ(1 - μ)*(1 + μ)/((1 - μ)*(1 + μ))
η_D == (2*μ)/(1 - μ)  # or as μ approaches 1.  However in this case you produce no thrust.
# Bonus :
d/dδ(((1 - t)/(1 - w))*η_pump*2*η_pump*((δ - 1) - C_D_ram*1/2)/(δ^2 - 1 + 2*(g*h/V_a^2) + K_in_ram + K_out_ram*δ^2)) → 2*(1 - t)/(1 - w)*η_pump^2/(δ^2 - 1 + 2*g*h/V_a^2 + K_in_ram + K_out_ram*δ^2) - 2*(1 - t)/(1 - w)*η_pump^2*(δ - 1 - 1/2*C_D_ram)/(δ^2 - 1 + 2*g*h/V_a^2 + K_in_ram + K_out_ram*δ^2)^2*(2*δ + 2*K_out_ram*δ)
0 == 2*(1 - t)/(1 - w)*η_pump^2/(δ^2 - 1 + 2*g*h/V_a^2 + K_in_ram + K_out_ram*δ^2) - 2*(1 - t)/(1 - w)*η_pump^2*(δ - 1 - 1/2*C_D_ram)/(δ^2 - 1 + 2*g*h/V_a^2 + K_in_ram + K_out_ram*δ^2)^2*(2*δ + 2*K_out_ram*δ)
# Now simplify to:
0 == (δ^2 - 1 + 2*g*h/V_a^2 + K_in_ram + K_out_ram*δ^2) - (δ - 1 - 1/2*C_D_ram)*(2*δ + 2*K_out_ram*δ)
0 == δ^2*(1 + K_out_ram) - 1 + 2*g*h/V_a^2 + K_in_ram - 2*δ^2 - 2*δ^2*K_out_ram + 2*δ + 2*δ*K_out_ram + C_D_ram*δ + C_D_ram*K_out_ram*δ
0 == δ^2 - 2*(1 + C_D/2)*δ + (1 - (2*gh/V_a^2) - K_in_ram)/(1 + K_out)  # Use only positive root
# you could simplify further
# but you can see the solution.
δ == (2*(1 + C_D/2) - sqrt((2*(1 + C_D/2))^2 - 4*(1 - (2*gh/V_a^2) - K_in_ram)/(1 + K_out)))/2
# Problem 2:
V_s := 70*knot
T_net := 225000 lbf
w := .04
t := .08
# Any reasonable
# estimate will work
# for w,t.
V_a := V_s*(1 - w)
therefore, □
V_a = 113.421 ft/s
V_j := 2*V_a
therefore, □
V_j = 226.842 ft/s
ρ := 1.9905*lbf*sec^2/ft^4
h := 12 ft
C_D_ram := .4
K_in_ram := .8
K_out_ram := .7
η_pump := .9
C_D_flush := .15
K_in_flush := .2
K_out_flush := K_in_flush
# You had to find total propulsive efficiency, pump pressure rise, mass flowrate, and total
# hp delivered.  Not necessarily in that order.  Sorry about that.
# You could start anywhere, I chose to start with pressure rise:
ΔP := 1/2*ρ*V_a^2*((V_j/V_a)^2 - 1 + (2*g*h/V_a^2) + K_in_ram + K_out_ram*(V_j/V_a)^2)
ΔP = 592.149 psi
ΔP = 1371.73 ton/(ft*s^2)
# Next I can rearrange the net thrust equation and solve for mass flowrate:
m_flowrate := T_net/(V_a*(((V_j/V_a) - 1) - C_D_ram*1/2))
m_flowrate = 79782.1 lb/s
m_flowrate = 2479.7 slug/s
# Now I can find ideal pump power, since I already gave you pump efficiency we can solve for power
# delivered.
P_pi := m_flowrate*(ΔP/ρ)
P_p := P_pi/η_pump
P_p = 214598 hp
η_D_ram := ((1 - t)/(1 - w))*η_pump*(2*η_pump*(((V_j/V_a) - 1) - C_D_ram*1/2)/((V_j/V_a)^2 - 1 + 2*(g*h/V_a^2) + K_in_ram + K_out_ram*(V_j/V_a)^2))
η_D_ram = 0.186486
# if
μ := V_a/V_j  # then
η_D_ram_1 := ((1 - t)/(1 - w))*η_pump*(η_pump*2*μ*((1 - μ) - C_D_ram*(1/2)*μ)/(1 + K_out_ram - μ^2*(1 - K_in_ram) + 2*g*h/V_j^2))
η_D_ram_1 = 0.186486
# Now for the Flush:
ΔP_flush := 1/2*ρ*V_a^2*((V_j/V_a)^2 - 1 + (2*g*h/V_a^2) + K_in_flush + K_out_flush*(V_j/V_a)^2)
ΔP_flush = 360.981 psi
ΔP_flush = 836.223 ton/(s^2*ft)
m_flowrate_flush := T_net/(V_a*(((V_j/V_a) - 1) - C_D_flush*1/2))
m_flowrate_flush = 69000.7 lb/s
P_pi_flush := m_flowrate_flush*(ΔP_flush/ρ)
P_p_flush := P_pi_flush/η_pump
P_p_flush = 113143 hp
η_D_f := ((1 - t)/(1 - w))*η_pump*(2*η_pump*(((V_j/V_a) - 1) - C_D_flush*1/2)/((V_j/V_a)^2 - 1 + 2*(g*h/V_a^2) + K_in_flush + K_out_flush*(V_j/V_a)^2))
η_D_f = 0.353708
# if
μ := V_a/V_j  # then
η_D_f_1 := ((1 - t)/(1 - w))*η_pump*(η_pump*2*μ*((1 - μ) - C_D_flush*(1/2)*μ)/(1 + K_out_flush - μ^2*(1 - K_in_flush) + 2*g*h/V_j^2))
η_D_f_1 = 0.353708
