# PS 3:  Propeller Assignment Solutions
# Fall 2006
D := 5 m
V_s := 13*m/s
rpm := min^-1
n := 156*rpm
T_req := 991.5 kN
Depth_pr := 8 m
P_v := 2500 Pa
ρ := 997*kg/m^3
G := .026981
U_a := .19139*V_s
U_t := -.10959*V_s
R_1 := D/2
r := R_1*.697
C_D := .008
C_1 := .34696*D
Γ := 2*π*R_1*V_s*G
P_atm := 101325 Pa
# 1.
A_o := (π/4)*D^2
V_a := V_s
C_t := T_req/(.5*ρ*A_o*V_a^2)
λ := V_a/(π*n*D)
λ = 0.31831
C_t = 0.599392
# Therefore efficiency from the diagram is 80% (+/- 10%) is acceptable.
# 2.
ω_r := V_s*((π*(r/R_1))/1)
V_star := V_s*sqrt((U_t/V_s + ω_r/V_s)^2 + (U_a/V_s + V_a/V_s)^2)
C_L := (2*π*G)/((V_star/V_s)*(C_1/D))
C_L = 0.20383
# From the NACA table a=.08, the max f_o/c is 6.79% for a C_L=1.0
f0_over_c_at_Cl_of_1 := .0679
fo_over_c := C_L*f0_over_c_at_Cl_of_1
fo_over_c = 0.01384
# From the NACA table, alpha ideal is 1.54 degrees
α_i := 1.54*deg
# 3.
# From PVL table:
β_i := 29.795 deg
Θ := β_i + α_i
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Θ = 31.335 deg
P := 2*π*r*tan(Θ)
D := 2*R_1
P/D == 2*π*r/(2*R_1)*tan(Θ) == π*(r/R)*tan(Θ)
P_over_D := π*r/R_1*tan(Θ)
P_over_D = 1.33319
# 4.
t_o_over_c := .014
fo_over_c = 0.01384
negC_pmin := .25
h := 8*m - r/R_1*D/2
h = 6.2575 m
V_star = 31.1627 m/s
P_inf := P_atm + ρ*g*h
P_inf = 162506 Pa
σ_local := (P_inf - P_v)/(1/2*ρ*V_star^2)
σ_local = 0.330523
negCpmin == (.25 < σ_local) == .331
# Therefore no cavitation
